! 清除所有数据
/CLEAR,START

! 定义工作文件名和标题
/FILNAME,2D_Lattice_Tensile_Simulation
/TITLE,2D Lattice Structure Tensile Simulation in X Direction

! 读取几何信息
! 建立边长为50且原点在左下角的正方形
BLC4,0,0,50,50

! 在正方形左上区域减去一个三角形
K,100,0,5
K,101,0,45
K,102,40,45
A,100,101,102
ASBA,1,2

! 以y=x为对称线在右下区域减去一个三角形
K,103,5,0
K,104,45,0
K,105,45,40
A,103,104,105
ASBA,1,3

! 定义材料属性
! 定义弹性模量和泊松比
MP,EX,1,2e8
MP,NUXY,1,0.3

! 定义塑性行为，多线性等向强化模型
TB,MISO,1
TBDATA,1,4e5,0
TBDATA,2,5e5,0.01
TBDATA,3,20.5e6,10.01

! 定义单元类型
ET,1,PLANE183
KEYOPT,1,3,2 ! 平面应变

! 网格划分
MSHAPE,0,2D ! 二维网格
MSHKEY,0 ! 自由网格划分
LESIZE,ALL,,,2 ! 智能化网格划分，等级为2
AMESH,ALL

! 镜像操作
ARSYM,X,ALL,0,0
ARSYM,Y,ALL,0,0

! 合并和压缩网格实体编号
NUMMRG,ALL
NUMCMP,ALL

! 进入求解器模块
/SOLU
ANTYPE,STATIC ! 静力分析

! 施加位移边界条件
! 固定上、下侧所有节点的y方向位移
NSEL,S,LOC,Y,-50,50,0.0001
NSEL,R,LOC,X,-50,50
D,ALL,UY,0

! 对左、右两侧节点施加拉伸位移
NSEL,S,LOC,X,-50
D,ALL,UX,0

NSEL,S,LOC,X,50
DO,i,1,100
    D,ALL,UX,i*0.01
    TIME,i
    KBC,0 ! 渐变加载
    SOLVE
ENDDO

! 结束求解
FINISH
