! 清除所有数据
/CLEAR,NOSTART

! 进入前处理器
/PREP7

! 建立边长为50，左下角为原点的正方形
BLC4,0,0,50,50

! 减去左上区域的三角形
K,100,0,5
K,101,0,45
K,102,40,45
A,100,101,102
ASBA,1,2

! 以y=x为对称线在右下区域减去三角形
ARSYM,X,ALL
ASBA,1,3

! 定义材料属性
MP,EX,1,2e8  ! 弹性模量
MP,PRXY,1,0.3 ! 泊松比

! 定义多线性等向强化模型
TB,MISO,1,1,3  ! 多线性等向强化模型，3个数据点
TBDATA,1,4e5,0  ! 初始塑性应变的应力
TBDATA,2,5e5,0.01  ! 塑性应变为0.01时的应力
TBDATA,3,20.5e6,10.01  ! 塑性应变为10.01时的应力

! 定义单元类型
ET,1,PLANE183
KEYOPT,1,3,2  ! 平面应变

! 智能化网格划分
ESIZE,0
MSHAPE,0,2D  ! 二维网格
MSHKEY,0  ! 自由网格划分
SMRTSIZE,2  ! 智能化网格划分等级为2
AMESH,ALL

! 镜像操作
ARSYM,X,ALL,0,0
ARSYM,Y,ALL,0,0

! 合并和压缩网格实体编号
NUMMRG,ALL
NUMCMP,ALL

! 进入求解器模块
/SOLU

! 定义分析类型为静力分析
ANTYPE,STATIC

! 施加位移边界条件
! 上、下侧所有节点在y方向固定
NSEL,S,LOC,Y,0,100
NSEL,R,LOC,Y,0,1e-6
D,ALL,UY,0
NSEL,S,LOC,Y,0,100
NSEL,R,LOC,Y,99.99,100
D,ALL,UY,0

! 循环施加x方向位移
TIME,0
NSUBST,1
KBC,0
NSEL,S,LOC,X,0,1e-6
D,ALL,UX,0
NSEL,S,LOC,X,99.99,100
DO I,1,100
    TIME,I*0.01
    D,ALL,UX,I*0.01
    SOLVE
ENDDO

! 结束求解
FINISH
