/prep7
! 定义基体材料的属性
mp,ex,1,2e8       ! 弹性模量 2e8
mp,nuxy,1,0.3     ! 泊松比 0.3

! 定义塑性行为及多线性等向强化模型
tb,plast,1,1      ! 塑性模型，材料号1，第一个表格
tbdata,1,4e5,0    ! 初始塑性应变应力为4e5
tbdata,2,5e5,0.01 ! 塑性应变为0.01时，应力5e5
tbdata,3,20.5e6,10.01 ! 塑性应变为10.01时，应力20.5e6

! 创建几何体
blc4,0,0,50,50    ! 创建边长50的正方形，左下角为原点
! 减去左上三角形
blc4,0,45,40,10,0 ! 创建左上三角形区域 (0,5),(0,45),(40,45)
asel,s,area,,2    ! 选择三角形区域
adele,all         ! 删除选择的三角形区域
! 减去右下三角形
blc4,40,0,10,40,0 ! 创建右下三角形区域，顶点以y=x为对称
asel,s,area,,3    ! 选择右下三角形区域
adele,all         ! 删除选择的三角形区域

! 设置单元类型
et,1,plane183     ! 平面应变单元 PLANE183
! 网格划分
esel,all
vmesh,all         ! 智能化网格划分，默认等级
! 手动设置网格等级为2（细化）
esel,all
vmesh,all

! 镜像操作 - x方向
nsel,all
esel,all
nsym,x,0,0,1      ! 关于x轴镜像，完成一半到另一半
! 镜像操作 - y方向
nsel,all
esel,all
nsym,y,0,0,1      ! 关于y轴镜像，组成100*100结构

! 压缩和合并节点编号
numcmp,all        ! 压缩节点编号
nummrg,node       ! 合并重复节点

! 进入求解器模块
/solu
! 设置分析类型
antype,static     ! 静力分析
! 位移边界条件
nsel,s,loc,y,0    ! 选择下边界所有节点
d,all,uy,0        ! 固定下边界y方向
nsel,s,loc,y,100  ! 选择上边界所有节点
d,all,uy,0        ! 固定上边界y方向

! 施加位移载荷 - 左侧向右拉伸
nsel,s,loc,x,0    ! 左边界节点
d,all,ux,0        ! 初始位移为0
nsel,s,loc,x,100  ! 右边界节点
d,all,ux,1        ! 总位移1，通过增量施加

! 时间步循环施加位移
*do,i,1,100,1     ! 循环100次，每次位移增量0.01
   time,i*0.01    ! 设置时间步
   nsel,s,loc,x,0 ! 左侧节点
   e,all,ux,i*0.01 ! 增量施加位移
   solve           ! 求解
*enddo

! 结束求解
finish
/exit,all
