/prep7
! 设置单位和定义参数
et,1,plane183       ! 定义单元类型为PLANE183
keyopt,1,3,0       ! 设置为平面应变
mp,ex,1,2e8        ! 定义基体材料弹性模量
mp,nuxy,1,0.3      ! 定义泊松比

! 创建初始正方形
blc4,0,0,50,50     ! 在左下角(0,0)创建边长为50的正方形

! 减去左上角三角形
k,1,0,5
k,2,0,45
k,3,40,45
a,1,2,3            ! 通过点1,2,3创建三角形区域
asel,s,area,,,1    ! 选择三角形区域
esla,s             ! 选择与区域相关的单元
adele,all          ! 删除选中的单元

! 减去右下角三角形（通过y=x对称）
k,4,50,0
k,5,45,5
k,6,45,45
a,4,5,6            ! 通过点4,5,6创建对称的三角形区域
asel,s,area,,,2    ! 选择三角形区域
esla,s             ! 选择与区域相关的单元
adele,all          ! 删除选中的单元

! 定义材料塑性行为
tb,plast,1         ! 打开塑性行为定义
tbdata,1,4e5,0     ! 初始塑性应变对应的应力
tbdata,2,5e5,0.01  ! 塑性应变为0.01时对应的应力
tbdata,3,20.5e6,10.01 ! 塑性应变为10.01时对应的应力

! 划分网格
esla,all
vmesh,all          ! 对所有面进行网格划分
esel,all
type,1
mat,1
esla,all
vmesh,all

! 设置智能化网格划分等级为2
mshkey,2

! 在x和y方向进行镜像操作
nsel,s,loc,x,0     ! 选择x=0线上的所有节点
nsel,r,loc,y,25    ! 从中选择y=25（中心线）
d,all,ux,0         ! 固定这些节点的x位移（对称面）

nsel,s,loc,y,0     ! 选择下边界y=0的所有节点
d,all,uy,0         ! 固定下边界y方向的位移

nsel,s,loc,y,50    ! 选择上边界y=50的所有节点
d,all,uy,0         ! 固定上边界y方向的位移

! 镜像生成完整结构
eplot
nsel,all
esel,all
nmirror,y,0,1      ! 关于y=0镜像
nmirror,x,0,1      ! 关于x=0镜像

! 合并和压缩实体编号
nummrg,node        ! 合并节点
numcmp,node        ! 压缩节点编号

! 进入求解器模块
/solu
solve

! 静力分析设置
antype,static      ! 分析类型为静力

! 位移边界条件施加
nsel,s,loc,x,0     ! 左边界
d,all,ux,0         ! 左边界x位移固定

nsel,s,loc,x,100   ! 右边界
nsel,r,loc,y,25    ! 确保选择的是右边界节点
d,all,ux,1         ! 施加右边界总位移1

! 以循环方式进行拉伸求解
*do,i,1,100,1
   nsel,s,loc,x,0   ! 选择左边界
   esel,s,live      ! 选择相关的单元
   d,all,ux,0.01*i  ! 增加位移
   solve            ! 求解
*enddo

! 结束求解过程
finish
/exit,all
